OpenVSP model (file version 5), 4 components.
Geometry view with OpenVSP parameter names; values to 6 digits, angles in degrees, lengths in the model's unit.
Overall bounding box: X_Min=0 X_Len=20.5046 Y_Min=-12.5479 Y_Len=25.0958 Z_Min=-1.46492 Z_Len=6.17264

Fuselage "Fuselage dirX"
  location (X Y Z) 0 0 0, rotation 0 0 0
  bounding box size 20.5046 3.68159 3.83183
  Design: Length=20.23
  cross sections:
    n   XLocPercent  YLocPercent  YRotate  ZLocPercent  shape
    0   0            0            0        0            point
    1   0.0551162    0            0        0            circle Circle_Diameter=1.0833
    2   0.065        0            0        -0.004       general fuselage BotStr=1 BotTanAngle=90 CornerRad=0 Height=1.35 LowStr=1 MaxWidthLoc=0.172727 TopStr=1 TopTanAngle=90 UpStr=1 Width=2.62464
    3   0.205        0            0        -0.0088      general fuselage BotStr=1.4 BotTanAngle=90 CornerRad=0 Height=2.43 LowStr=1.4 MaxWidthLoc=0.0636364 TopStr=1.2 TopTanAngle=90 UpStr=1.2 Width=3.35
    4   0.273908     0            0        -0.0044      general fuselage BotStr=1.4 BotTanAngle=90 CornerRad=0 Height=2.6 LowStr=1.4 MaxWidthLoc=0 TopStr=1.2 TopTanAngle=90 UpStr=1.2 Width=3.5
    5   0.39424      0            0        0.024        general fuselage BotStr=1.2 BotTanAngle=90 CornerRad=0 Height=3.72 LowStr=1.2 MaxWidthLoc=-0.281818 TopStr=1.4 TopTanAngle=90 UpStr=1.4 Width=3.60888
    6   0.529584     0            0        0.018288     general fuselage BotStr=1.4 BotTanAngle=90 CornerRad=0 Height=3.01834 LowStr=1.5 MaxWidthLoc=-0.145455 TopStr=1.2 TopTanAngle=90 UpStr=1.2 Width=3.08065
    7   0.652301     0            0        0.0177935    general fuselage BotStr=1.4 BotTanAngle=90 CornerRad=0 Height=2.4606 LowStr=1.5 MaxWidthLoc=-0.0545455 TopStr=1.2 TopTanAngle=90 UpStr=1.2 Width=2.22373
    8   0.767571     0            0        0.018288     general fuselage BotStr=1.4 BotTanAngle=90 CornerRad=0 Height=1.96 LowStr=1.4 MaxWidthLoc=0 TopStr=1.2 TopTanAngle=90 UpStr=1.2 Width=1.41455
    9   0.897681     0            0        0.0196484    general fuselage BotStr=1.4 BotTanAngle=90 CornerRad=0 Height=1.4 LowStr=1.4 MaxWidthLoc=0 TopStr=1 TopTanAngle=90 UpStr=1 Width=0.65616
    10  1            0            -10      0.02175      general fuselage BotStr=1 BotTanAngle=90 CornerRad=0 Height=1.11547 LowStr=1 MaxWidthLoc=0 TopStr=1 TopTanAngle=90 UpStr=1 Width=0.07
    11  1            0            -10      0.02175      point

Wing "Wing dirY"
  location (X Y Z) 5.0654 0.005 -1.18, rotation 0 0 0
  symmetric about XZ
  bounding box size 4.84813 25.0958 1.43535
  totals: TotalSpan=25.14 TotalProjectedSpan=25.0788 TotalChord=3.84667 TotalArea=117.997 TotalAR=5.33019 MAC=4.78682
  root: chord 4.84, twist 1, airfoil file "NACA 23013 Airfoil cl=0.30 T=13.5% P=15.0%"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 BaseThickChord=0.135151 ThickChord=0.135151
  sections:
    n  Span  Root_Chord  Tip_Chord  Area    Sweep  Sweep_Location  Dihedral  Twist  Twist_Location  tip airfoil
    1  11    4.84        4.84       53.24   0      0               4         1      1               as above
    2  1     4.84        4.18       4.51    0      1               4         1      1               edit curve Width=4.18 Height=0.35 AbsoluteFlag=0 SymType=0 cubic Bezier points (X Y): 0.5 0, 0.415756 -0.0879954, 0.331216 -0.16016, 0.246531 -0.220768, 0.161847 -0.281376, 0.0770001 -0.330544, -0.00798262 -0.360612, -0.0929653 -0.39068, -0.178178 -0.404047, -0.263107 -0.367168, -0.305571 -0.348729, -0.347887 -0.313873, -0.390017 -0.270274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
    3  0.57  4.18        0.2        1.2483  0      1               4         1      1               airfoil file "NACA 23013 Airfoil cl=0.30 T=13.5% P=15.0%"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 BaseThickChord=0.135151 ThickChord=0.135151
  SS_Control "Flaps": UStart=0.231707 UEnd=0.3177 Length_C_Start=0.2 Length_C_End=0.2 Length_Start=0.968691 Length_End=0.968691 LE_Flag=0 Surf_Type=2
  SS_Control "Ailerons": UStart=0.3177 UEnd=0.399 Length_C_Start=0.2 Length_C_End=0.2 Length_Start=0.968691 Length_End=0.968691 LE_Flag=0 Surf_Type=2

Wing "StabHor dirY"
  location (X Y Z) 16.17 0 0.82, rotation 0 0 0
  symmetric about XZ
  bounding box size 3.2808 8.99004 0.32827
  totals: TotalSpan=8.8 TotalProjectedSpan=8.8 TotalChord=2.60824 TotalArea=22.9525 TotalAR=3.37393 MAC=2.66605
  root: chord 3.2808, twist 0, NACA 4-series Camber=0 CamberLoc=0.2 ThickChord=0.1
  sections:
    n  Span  Root_Chord  Tip_Chord  Area     Sweep  Sweep_Location  Dihedral  Twist  Twist_Location  tip airfoil
    1  4.4   3.2808      1.93567    11.4762  10     0               0         0      0.25            as above
  SS_Control "Elevator": UStart=0.37 UEnd=0.665 Length_C_Start=0.392616 Length_C_End=0.396417 Length_Start=1.23 Length_End=0.77 LE_Flag=0 Surf_Type=2

Wing "StabVer dirZ"
  location (X Y Z) 15.844 -0.0561 0.788, rotation 90 0 0
  bounding box size 4.32937 0.350936 3.91972
  totals: TotalSpan=3.812 TotalProjectedSpan=3.812 TotalChord=3.274 TotalArea=12.4805 TotalAR=1.16432 MAC=3.38753 RelativeTwistFlag=1
  root: chord 4.33, twist 1, NACA 4-series Camber=0 CamberLoc=0.2 ThickChord=0.08
  sections:
    n  Span   Root_Chord  Tip_Chord  Area     Sweep  Sweep_Location  Dihedral  Twist  Twist_Location  tip airfoil
    1  3.812  4.33        2.218      12.4805  18     0.0297483       0         0      0.25            NACA 4-series Camber=0 CamberLoc=0.2 ThickChord=0.1

VSPAERO settings (reference component "Wing dirY"): Sref=117.997 bref=25.14 cref=3.84667 Xcg=8.68553 Ycg=0.000141789 Zcg=-0.0642094 AlphaStart=-10 AlphaEnd=10 AlphaNpts=11 BetaStart=0 BetaEnd=0 BetaNpts=1 MachStart=0.1 MachEnd=0.269 MachNpts=1 ReCref=1e+08 Vinf=100 Rho=1.2
  control group "Elevators": DeflectionAngle=0
  control group "Ailerons": DeflectionAngle=0
  control group "Flaps": DeflectionAngle=0
