OpenVSP model (file version 5), 4 components.
Geometry view with OpenVSP parameter names; values to 6 digits, angles in degrees, lengths in the model's unit.
Overall bounding box: X_Min=0 X_Len=27.0448 Y_Min=-19.0575 Y_Len=38.1151 Z_Min=-1.4175 Z_Len=6.11854

Fuselage "Fuselage dirX"
  location (X Y Z) 0 0 0, rotation 0 0 0
  bounding box size 27.0448 3.375 3.375
  Design: Length=27
  cross sections:
    n  XLocPercent  YLocPercent  ZLocPercent  shape
    0  0            0            0            point
    1  0.25         0            0.01         ellipse Ellipse_Height=3.375 Ellipse_Width=3.375
    2  0.52         0            0.012        ellipse Ellipse_Height=3.24 Ellipse_Width=3.375
    3  0.75         0            0.018        circle Circle_Diameter=2.241
    4  1            0            0.027        circle Circle_Diameter=0.27
    5  1            0            0.027        point

Wing "Wing dirY"
  location (X Y Z) 10.2 0.02 0, rotation 0 0 0
  symmetric about XZ
  bounding box size 4.55748 38.1151 0.803069
  totals: TotalSpan=37.9643 TotalProjectedSpan=37.952 TotalChord=3.75011 TotalArea=147.709 TotalAR=9.75125 MAC=3.97171
  root: chord 4.27746, twist 0, NACA 4-series Camber=0.04 CamberLoc=0.4 ThickChord=0.12
  sections:
    n  Span      Root_Chord  Tip_Chord  Area     Sweep  Sweep_Location  Dihedral  Twist   Twist_Location  tip airfoil
    1  0.625     4.27746     4.26489    2.66948  1.5    0               1.5       0.4375  0.25            NACA 4-series Camber=0.02 CamberLoc=0.4 ThickChord=0.1
    2  0.625     4.26489     4.25232    2.66163  1.5    0               1.5       0.4375  0.25            as above
    3  0.625     4.25232     4.23975    2.65377  1.5    0               1.5       0.4375  0.25            as above
    4  0.625     4.23975     4.22718    2.64591  1.5    0               1.5       0.4375  0.25            as above
    5  2.5       4.22718     4.1769     10.5051  1.5    0               1.5       1.75    0.25            as above
    6  11        4.1769      3.84971    44.1463  3      0               1.5       1.5     0.25            as above
    7  1.17857   3.84971     3.4        4.27215  20     0               1.5       1.5     0.25            as above
    8  0.803571  3.4         2.7214     2.45949  40     0               1.5       1.5     0.25            as above
    9  1         2.7214      0.960317   1.84086  60     0               0         0       0.25            NACA 4-series Camber=0.02 CamberLoc=0.2 ThickChord=0.1

Wing "StabHor dirY", child of "Wing dirY"
  location (X Y Z) 23 0.01 0.72, rotation 0 0 0
  symmetric about XZ
  bounding box size 3.88946 9.61036 0.406668
  totals: TotalSpan=9.48683 TotalProjectedSpan=9.48683 TotalChord=2.65937 TotalArea=21.8197 TotalAR=4.12471 MAC=2.49167
  root: chord 3.45, twist 0, NACA 4-series Camber=0.02 CamberLoc=0.2 Invert=1 ThickChord=0.104545
  sections:
    n  Span      Root_Chord  Tip_Chord  Area     Sweep  Sweep_Location  Dihedral  Twist  Twist_Location  tip airfoil
    1  0.592927  3.45        3.1625     1.96037  30     0               0         0      0.25            NACA 4-series Camber=0 CamberLoc=0.2 ThickChord=0.1
    2  0.592927  3.1625      2.875      1.7899   30     0               0         0      0.25            as above
    3  1.18585   2.875       2.3        3.0684   30     0               0         0      0.25            as above
    4  2.37171   2.3         1.15       4.0912   30     0               0         0      0.25            as above

Wing "StabVer dirZ", child of "StabHor dirY"
  location (X Y Z) 23.0918 0 0.85, rotation 90 0 0
  bounding box size 3.375 0.337696 3.85104
  totals: TotalSpan=3.8 TotalProjectedSpan=3.8 TotalChord=2.60156 TotalArea=8.55 TotalAR=1.68889 MAC=2.4375
  root: chord 3.375, twist 0, NACA 4-series Camber=0 CamberLoc=0.2 ThickChord=0.1
  sections:
    n  Span   Root_Chord  Tip_Chord  Area     Sweep  Sweep_Location  Dihedral  Twist  Twist_Location  tip airfoil
    1  0.475  3.375       3.09375    1.53633  30     0               0         0      0.25            as above
    2  0.475  3.09375     2.8125     1.40273  30     0               0         0      0.25            as above
    3  0.95   2.8125      2.25       2.40469  30     0               0         0      0.25            as above
    4  1.9    2.25        1.125      3.20625  30     0               0         0      0.25            as above

VSPAERO settings (reference component "Wing dirY"): Sref=147.709 bref=37.9643 cref=3.35338 Xcg=9 Ycg=0 Zcg=0 AlphaStart=-10 AlphaEnd=10 AlphaNpts=11 BetaStart=0 BetaEnd=0 BetaNpts=1 MachStart=0.1 MachEnd=0 MachNpts=1 ReCref=1e+08 Vinf=100 Rho=0.002377
